// SBML level 2 version 4

model MesoRD_Test_System_Tutorial()
  // A simple system of three species

  // Compartments:
  compartment CompartmentCytopl; CompartmentCytopl has litre;

  // Species:
  substanceOnly species Aa in CompartmentCytopl = 0;  // substance in item
  substanceOnly species Bb in CompartmentCytopl = 1000;  // substance in item
  substanceOnly species Cc in CompartmentCytopl = 0;  // substance in item

  // Parameters:
  c1 = 1 ps;
  c2 = 0.2 ps;
  c3 = 2 ps;

  // Reactions:
  R1: Aa => Bb; Aa*c1;
  R2: Bb => Cc; Bb*c2;
  R3: Cc => Aa; Cc*c3;

  // Unit definitions:
  unit degree = 0.01745329 radian;
  unit ps = 1 / second;
  unit um = 1e-6 metre;
  unit um2ps = (1e-6 metre)^2 / second;
end
